*Heading
** Job name: GUI Model name: GUI_Model
** Generated by: Abaqus/CAE Learning Edition 2023
*Preprint, echo=NO, model=NO, history=NO, contact=NO
**
** PARTS
**
*Part, name=Roof
*Node
      1,          10.,   4.59935808,          35.
      2,          10.,   4.59935808,           0.
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*Element, type=S4R
 1,   1,  13,  91,  38
 2,  13,  14,  92,  91
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*Nset, nset=_PickedSet2, internal, generate
   1,  210,    1
*Elset, elset=_PickedSet2, internal, generate
   1,  180,    1
*Nset, nset=Support_Set, generate
  1,  90,   1
*Elset, elset=Support_Set
   1,   9,  10,  18,  19,  27
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*Nset, nset=All_Faces_Set, generate
   1,  210,    1
*Elset, elset=All_Faces_Set, generate
   1,  180,    1
*Nset, nset=Pressure_Set
   1,   2,   3,   4,   5,   6
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*Elset, elset=Pressure_Set, generate
   1,  162,    1
** Section: Roof_Section
*Shell Section, elset=_PickedSet2, material=Steel
1., 5
*End Part
**
**
** ASSEMBLY
**
*Assembly, name=Assembly
**
*Instance, name=Roof-1, part=Roof
*End Instance
**
*Elset, elset=__PickedSurf4_SNEG, internal, instance=Roof-1, generate
   1,  162,    1
*Surface, type=ELEMENT, name=_PickedSurf4, internal
__PickedSurf4_SNEG, SNEG
*End Assembly
**
** MATERIALS
**
*Material, name=Steel
*Elastic
210000., 0.3
** ----------------------------------------------------------------
**
** STEP: Step-1
**
*Step, name=Step-1, nlgeom=NO
*Static, direct
0.1, 1.,
**
** BOUNDARY CONDITIONS
**
** Name: BC-1 Type: Symmetry/Antisymmetry/Encastre
*Boundary
Roof-1.Support_Set, ENCASTRE
**
** LOADS
**
** Name: Load-1   Type: Pressure
*Dsload
_PickedSurf4, P, 200.
**
** OUTPUT REQUESTS
**
*Restart, write, frequency=0
**
** FIELD OUTPUT: F-Output-1
**
*Output, field, variable=PRESELECT
**
** HISTORY OUTPUT: H-Output-1
**
*Output, history, variable=PRESELECT
*End Step
